#
# Note : check consistency of area unit and length units in this file
# Note : check consistency with inertia units of the .mass file
#
#
STARTG01
0.0                                 | Mach
0     0     0.0                     | iYsym  iZsym  Zsym
831.51976     7.59487   120.76752   | Sref   Cref   Bref
  0.00000     0.00000     0.00000   | Xref   Yref   Zref
 0.00                               | CDp  (optional)


#========TODO: REMOVE OR MODIFY MANUALLY DUPLICATE SECTIONS IN SURFACE DEFINITION=========
SURFACE                      | (keyword)
Main Wing
#Nchord    Cspace   [ Nspan Sspace ]
15        1.0

INDEX                        | (keyword)
1858                         | Lsurf

YDUPLICATE
0.0

SCALE
1.0  1.0  1.0

TRANSLATE
0.0  0.0  0.0

ANGLE
   3.5                        | dAinc


#____PANEL 1_______
#______________
SECTION                                                     |  (keyword)
   0.0000    0.0000    0.0000   10.1880   0.000   10    1   | Xle Yle Zle   Chord Ainc   [ Nspan Sspace ]

AFIL 0.0 1.0
Airfoils/NACA 64-210.dat

CONTROL
inboard_slat 1.0 -0.1 0. 0. 0. 1.0 ! name , gain , Xhinge , XYZhvec , SgnDup

CONTROL
inboard_flap 1.0 0.75 0. 0. 0. 1.0 ! name , gain , Xhinge , XYZhvec , SgnDup

#____PANEL 2_______
#______________
SECTION                                                     |  (keyword)
   0.9980   11.4220    0.0000    9.3026   0.000   15    0   | Xle Yle Zle   Chord Ainc   [ Nspan Sspace ]

AFIL 0.0 1.0
Airfoils/NACA 64-210.dat

CONTROL
inboard_slat 1.0 -0.1 0. 0. 0. 1.0 ! name , gain , Xhinge , XYZhvec , SgnDup

CONTROL
inboard_flap 1.0 0.75 0. 0. 0. 1.0 ! name , gain , Xhinge , XYZhvec , SgnDup

CONTROL
outboard_slat 1.0 -0.1 0. 0. 0. 1.0 ! name , gain , Xhinge , XYZhvec , SgnDup

CONTROL
outboard_flap 1.0 0.75 0. 0. 0. 1.0 ! name , gain , Xhinge , XYZhvec , SgnDup


SECTION                                                     |  (keyword)
   2.997   34.267    0.0000    6.512   0.000    15    0   | Xle Yle Zle   Chord Ainc   [ Nspan Sspace ]

AFIL 0.0 1.0
Airfoils/NACA 64-210.dat

CONTROL
outboard_slat 1.0 -0.1 0. 0. 0. 1.0 ! name , gain , Xhinge , XYZhvec , SgnDup

CONTROL
outboard_flap 1.0 0.75 0. 0. 0. 1.0 ! name , gain , Xhinge , XYZhvec , SgnDup


#____PANEL 3_______
#______________
SECTION                                                     |  (keyword)
   4.9960   57.1114    0.0000    3.7210   0.000    5    0   | Xle Yle Zle   Chord Ainc   [ Nspan Sspace ]

AFIL 0.0 1.0
Airfoils/NACA 64-210.dat


#______________
SECTION                                                     |  (keyword)
   7.7210   58.3436    2.9802    0.9989   0.000   11    0   | Xle Yle Zle   Chord Ainc   [ Nspan Sspace ]

AFIL 0.0 1.0
Airfoils/NACA 64-210.dat


#========TODO: REMOVE OR MODIFY MANUALLY DUPLICATE SECTIONS IN SURFACE DEFINITION=========
SURFACE                      | (keyword)
Elevator
#Nchord    Cspace   [ Nspan Sspace ]
15        1.0

INDEX                        | (keyword)
1860                         | Lsurf

YDUPLICATE
0.0

SCALE
1.0  1.0  1.0

TRANSLATE
0.0  0.0  0.0

ANGLE
   0.000                         | dAinc


#____PANEL 1_______
#______________
SECTION                                                     |  (keyword)
  45.3170    0.0000   10.8040    5.7490   0.000   19    3   | Xle Yle Zle   Chord Ainc   [ Nspan Sspace ]

AFIL 0.0 1.0
Airfoils/NACA 0012.dat

CONTROL
elevator 1.0 0.75 0. 0. 0. 1.0 ! name , gain , Xhinge , XYZhvec , SgnDup

#______________
SECTION                                                     |  (keyword)
  48.2470   10.2198   10.8040    3.4492   0.000   19    3   | Xle Yle Zle   Chord Ainc   [ Nspan Sspace ]

AFIL 0.0 1.0
Airfoils/NACA 0012.dat

CONTROL
elevator 1.0 0.75 0. 0. 0. 1.0 ! name , gain , Xhinge , XYZhvec , SgnDup


#========TODO: REMOVE OR MODIFY MANUALLY DUPLICATE SECTIONS IN SURFACE DEFINITION=========
SURFACE                      | (keyword)
Fin
#Nchord    Cspace   [ Nspan Sspace ]
13        1.0

INDEX                        | (keyword)
1861                         | Lsurf

SCALE
1.0  1.0  1.0

TRANSLATE
0.0  0.0  0.0

ANGLE
   -2                         | dAinc


#____PANEL 1_______
#______________
SECTION                                                     |  (keyword)
  43.7620   -0.0000   11.7500    8.5000   0.000   10    0   | Xle Yle Zle   Chord Ainc   [ Nspan Sspace ]

AFIL 0.0 1.0
Airfoils/NACA 0012.dat


#____PANEL 2_______
#______________
SECTION                                                     |  (keyword)
  40.4420   -0.0000    6.0000   10.0000   0.000   10    2   | Xle Yle Zle   Chord Ainc   [ Nspan Sspace ]

AFIL 0.0 1.0
Airfoils/NACA 0012.dat


#______________
SECTION                                                     |  (keyword)
  32.1000    0.0000   -1.0000   16.0000   0.000   10    2   | Xle Yle Zle   Chord Ainc   [ Nspan Sspace ]

AFIL 0.0 1.0
Airfoils/NACA 0012.dat
