TestPlane
0
0 0 0
1 1 1
0 0 0
0
SURFACE
MainWing
1 10
COMPONENT
1
YDUPLICATE
0.0
TRANSLATE
0 0 0
ANGLE
0
SECTION
0 0 0 1 0 10 1
AFIL
Airfoils\S4022.dat
SECTION
0.25 5 0 0.5 0 10 1
AFIL
Airfoils\S4022.dat
SURFACE
hStab
2 5
COMPONENT
1
YDUPLICATE
0.0
TRANSLATE
5 0 0.5
ANGLE
0
SECTION
0 0 0 0.5 0 10 1
AFIL
Airfoils\S4022.dat
SECTION
0.125 2 0 0.25 0 10 1
AFIL
Airfoils\S4022.dat
